// SBML level 2 version 3

model temp()

  // Compartments:
  compartment cell = 1;

  // Species:
  species Lig_fc_fc in cell = Lig_tot; Lig_fc_fc is "Lig(fc,fc)";
  species Lyn_SH2_U in cell = Lyn_tot; Lyn_SH2_U is "Lyn(SH2,U)";
  species Rec_alpha_beta_0_gamma_0 in cell = Rec_tot; Rec_alpha_beta_0_gamma_0 is "Rec(alpha,beta~0,gamma~0)";
  species S4 in cell = 0; S4 is "Lig(fc!1,fc).Rec(alpha!1,beta~0,gamma~0)";
  species S5 in cell = 0; S5 is "Lyn(SH2,U!1).Rec(alpha,beta~0!1,gamma~0)";
  species S6 in cell = 0; S6 is "Lig(fc!1,fc).Lyn(SH2,U!2).Rec(alpha!1,beta~0!2,gamma~0)";
  species S7 in cell = 0; S7 is "Lig(fc!1,fc!2).Rec(alpha!2,beta~0,gamma~0).Rec(alpha!1,beta~0,gamma~0)";
  species S8 in cell = 0; S8 is "Lig(fc!1,fc!2).Lyn(SH2,U!3).Rec(alpha!2,beta~0!3,gamma~0).Rec(alpha!1,beta~0,gamma~0)";
  species S9 in cell = 0; S9 is "Lig(fc!1,fc!2).Lyn(SH2,U!3).Lyn(SH2,U!4).Rec(alpha!2,beta~0!3,gamma~0).Rec(alpha!1,beta~0!4,gamma~0)";
  species S10 in cell = 0; S10 is "Lig(fc!1,fc!2).Lyn(SH2,U!3).Rec(alpha!2,beta~0!3,gamma~0).Rec(alpha!1,beta~P,gamma~0)";
  species S11 in cell = 0; S11 is "Lig(fc!1,fc).Rec(alpha!1,beta~P,gamma~0)";
  species Rec_alpha_beta_P_gamma_0 in cell = 0; Rec_alpha_beta_P_gamma_0 is "Rec(alpha,beta~P,gamma~0)";
  species S13 in cell = 0; S13 is "Lig(fc!1,fc!2).Rec(alpha!2,beta~0,gamma~0).Rec(alpha!1,beta~P,gamma~0)";
  species S14 in cell = 0; S14 is "Lig(fc!1,fc!2).Rec(alpha!2,beta~P,gamma~0).Rec(alpha!1,beta~P,gamma~0)";

  // Parameters:
  Lig_tot = 6000;
  Rec_tot = 400;
  Lyn_tot = 28;
  kp1 = 1.3284524e-7;
  km1 = 0;
  kp2 = 0.25;
  km2 = 0;
  kpL = 0.05;
  kmL = 20;
  pLb = 30;
  dm = 20;

  // Assignment rules:
  RecDimer1 := 2*S7 + 2*S8 + 2*S9 + 2*S10 + 2*S13 + 2*S14;
  RecDimer2 := 2*S7 + 2*S8 + 2*S9 + 2*S10 + 2*S13 + 2*S14;
  LynFree := 0 + Lyn_SH2_U;
  LynBoundU := S5 + S6 + S8 + 2*S9 + S10;
  BetaP1 := S10 + S11 + Rec_alpha_beta_P_gamma_0 + S13 + 2*S14;
  BetaP2 := S10 + S11 + Rec_alpha_beta_P_gamma_0 + S13 + 2*S14;

  // Reactions:
  R1: Lig_fc_fc + Rec_alpha_beta_0_gamma_0 => S4; 2*kp1*Lig_fc_fc*Rec_alpha_beta_0_gamma_0;
  R2: Lyn_SH2_U + Rec_alpha_beta_0_gamma_0 => S5; kpL*Lyn_SH2_U*Rec_alpha_beta_0_gamma_0;
  R3: Lig_fc_fc + S5 => S6; 2*kp1*Lig_fc_fc*S5;
  R4: S4 => Lig_fc_fc + Rec_alpha_beta_0_gamma_0; km1*S4;
  R5: Rec_alpha_beta_0_gamma_0 + S4 => S7; kp2*Rec_alpha_beta_0_gamma_0*S4;
  R6: S4 + S5 => S8; kp2*S4*S5;
  R7: Lyn_SH2_U + S4 => S6; kpL*Lyn_SH2_U*S4;
  R8: S5 => Lyn_SH2_U + Rec_alpha_beta_0_gamma_0; kmL*S5;
  R9: S6 => Lig_fc_fc + S5; km1*S6;
  R10: Rec_alpha_beta_0_gamma_0 + S6 => S8; kp2*Rec_alpha_beta_0_gamma_0*S6;
  R11: S5 + S6 => S9; kp2*S5*S6;
  R12: S7 => Rec_alpha_beta_0_gamma_0 + S4; 2*km2*S7;
  R13: S8 => S4 + S5; km2*S8;
  R14: S8 => Rec_alpha_beta_0_gamma_0 + S6; km2*S8;
  R15: Lyn_SH2_U + S7 => S8; 2*kpL*Lyn_SH2_U*S7;
  R16: Lyn_SH2_U + S8 => S9; kpL*Lyn_SH2_U*S8;
  R17: S6 => Lyn_SH2_U + S4; kmL*S6;
  R18: S8 => Lyn_SH2_U + S7; kmL*S8;
  R19: S8 => S10; pLb*S8;
  R20: S9 => S5 + S6; 2*km2*S9;
  R21: S10 => S5 + S11; km2*S10;
  R22: S10 => S6 + Rec_alpha_beta_P_gamma_0; km2*S10;
  R23: S9 => Lyn_SH2_U + S8; 2*kmL*S9;
  R24: S10 => Lyn_SH2_U + S13; kmL*S10;
  R25: S10 => S8; dm*S10;
  R26: Lig_fc_fc + Rec_alpha_beta_P_gamma_0 => S11; 2*kp1*Lig_fc_fc*Rec_alpha_beta_P_gamma_0;
  R27: S11 => Lig_fc_fc + Rec_alpha_beta_P_gamma_0; km1*S11;
  R28: Rec_alpha_beta_0_gamma_0 + S11 => S13; kp2*Rec_alpha_beta_0_gamma_0*S11;
  R29: S5 + S11 => S10; kp2*S5*S11;
  R30: S4 + Rec_alpha_beta_P_gamma_0 => S13; kp2*S4*Rec_alpha_beta_P_gamma_0;
  R31: S6 + Rec_alpha_beta_P_gamma_0 => S10; kp2*S6*Rec_alpha_beta_P_gamma_0;
  R32: S11 + Rec_alpha_beta_P_gamma_0 => S14; kp2*S11*Rec_alpha_beta_P_gamma_0;
  R33: S13 => Rec_alpha_beta_0_gamma_0 + S11; km2*S13;
  R34: S13 => S4 + Rec_alpha_beta_P_gamma_0; km2*S13;
  R35: Lyn_SH2_U + S13 => S10; kpL*Lyn_SH2_U*S13;
  R36: S11 => S4; dm*S11;
  R37: Rec_alpha_beta_P_gamma_0 => Rec_alpha_beta_0_gamma_0; dm*Rec_alpha_beta_P_gamma_0;
  R38: S13 => S7; dm*S13;
  R39: S14 => S11 + Rec_alpha_beta_P_gamma_0; 2*km2*S14;
  R40: S14 => S13; 2*dm*S14;

  // Unit definitions:
  unit substance = item;
end
